// COMSOL Multiphysics 6.2.0.290 model "SymAsymModel.mph"
// Outline of the model tree
// Unit system: none

Parameters
  L = 8
  Hmin = 12/7
  a = 1
  Xmin = -4.0
  Xmax = 4.0
  B = 2.0*pi/L
  phi0 = 0
  phi30 = pi/6
  phi60 = pi/3
  phi90 = pi/2
  phi180 = pi
  phim30 = -pi/6
  phim60 = -pi/3
  phim90 = -pi/2
  Re = 10

Geometry
  geom1 "Geometry" (2D, length unit m)
    pc1: ParametricCurve "Sym-Top" | parmin = -4; parmax = 4; coord = {s, a*sin(B*s + (pi/2)) + ((Hmin/2) + a)}
    pc2: ParametricCurve "Sym-Bot" | parmin = -4; parmax = 4; coord = {s, a*sin(B*s + 1.5*pi + phim90) - (Hmin/2) - a}
    ls1: LineSegment "Inlet (left)" | vertex1 = pc1(1) points 1; vertex2 = pc2(1) points 1
    ls2: LineSegment "Outlet (right)" | vertex1 = pc1(1) points 2; vertex2 = pc2(1) points 2
    uni1: Union | input = ls1, ls2, pc1, pc2; keep = on
    csol1: ConvertToSolid "Solid building" | input = uni1
    fin: Finalize "Form Union"

Physics
  spf: LaminarFlow on all domains
    dependent variable u = {u, v, w}
    fp1: FluidProperties (default) | rho_mat = userdef; rho = 1; mu_mat = userdef; mu = 1/Re
    init1: init "Initial Values 1" (default)
    wallbc1: WallBC "Wall 1" (default)
    inl1: InletBoundary "Inlet(left)" on boundaries 1 | ComponentWise = VelocityFieldComponentWise; u0 = {1, 0, 0}
    out1: OutletBoundary "Outlet(right)" on boundaries 2 | SuppressBackflow = 1
    wallbc2: WallBC "Walls(Curved)" on boundaries 3, 4
  ht: HeatTransferInFluids (disabled) on all domains
    dependent variable T
    fluid1: FluidHeatTransferModel "Fluid 1" (default)
    init1: init "Initial Values 1" (default)
    ins1: ThermalInsulation (default)

Mesh
  mesh1 "Mesh 1" (physics-controlled)
    size: MeshSizeDefault | table = cfd; hauto = 2

Studies
  std1 "Study 1"
    stat: Stationary

Solver configurations
  sol1 "Solution 1" (study std1)
    v1: Variables "Dependent Variables 1"
    s1: Stationary "Stationary Solver 1"
      fc1: FullyCoupled | linsolver = d1; initstep = 0.01; maxiter = 100
      d1: Direct "Direct, fluid flow variables (spf)" | linsolver = pardiso; pivotperturb = 1.0E-13

Datasets
  dset1: Solution | solution = sol1

Plots
  pg1: PlotGroup2D "Velocity (spf)" | data = dset1
    surf1: Surface | expr = spf.U
  pg2: PlotGroup2D "Pressure (spf)" | data = dset1
    con1: Contour | expr = p; levelrounding = off
    surf1: Surface | expr = p; descr = Pressure

Exports
  data1: Data "Whole-CFD"
    data = dset1
    expr = {u, v, p}
    descr = {"Velocity field, x-component", "Velocity field, y-component", Pressure}
    filename = C:\Users\doyel\OneDrive\Desktop\SymVSASym\cfd_data\cfd_m90.txt
    includenan = off